*Heading
** Job name: Cylinder-2000-fine1 Model name: Calibration-3D-cylinder-fine1
** Generated by: Abaqus/CAE 6.12-1
*Preprint, echo=NO, model=NO, history=NO, contact=NO
**
** PARTS
**
*Part, name=Part-4-bottom
*Node
      1, -0.0126999998,           0., 0.0256500002
      2,           0., 0.0126999998, 0.0476424992
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*Element, type=C3D8
  1, 4750, 4751, 5178, 5177, 4076, 4077, 4696, 4695
  2, 4751, 4752, 5179, 5178, 4077, 4078, 4697, 4696
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*Element, type=COH3D8
8137, 10909, 10920, 11068, 10943, 11408, 11419, 11567, 11442
8138, 10920, 10921, 11069, 11068, 11419, 11420, 11568, 11567
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*Nset, nset=Set-1
  1123,  1124,  1125,  1126,  1127,  1128
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*Elset, elset=Set-1
  131,  132,  133,  134,  135,  136
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*Nset, nset=Set-2
  1213,  1214,  1215,  1216,  1217,  1218
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*Elset, elset=Set-2
    1,    2,    3,    4,    5,    6
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*Elset, elset=OffsetElements-1-Layer-1, generate
 8137,  8588,     1
*Elset, elset=_OffsetElements-1-BottomSurf_S1, internal, generate
 8137,  8588,     1
*Surface, type=ELEMENT, name=OffsetElements-1-BottomSurf
_OffsetElements-1-BottomSurf_S1, S1
*Elset, elset=_OffsetElements-1-TopSurf_S2, internal, generate
 8137,  8588,     1
*Surface, type=ELEMENT, name=OffsetElements-1-TopSurf
_OffsetElements-1-TopSurf_S2, S2
** Section: Steel
*Solid Section, elset=Set-2, material=Steel
,
** Section: rock
*Solid Section, elset=Set-1, material=rock
,
** Section: cohe
*Cohesive Section, elset=OffsetElements-1-Layer-1, material=cohe, response=TRACTION SEPARATION
,
*End Part
**
*Part, name=Part-4-top
*Node
      1, -0.0126999998,           0., 0.0256500002
      2,           0., 0.0126999998, 0.0476424992
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*Element, type=C3D8
  1, 4750, 4751, 5178, 5177, 4076, 4077, 4696, 4695
  2, 4751, 4752, 5179, 5178, 4077, 4078, 4697, 4696
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*Nset, nset=Set-1
  1123,  1124,  1125,  1126,  1127,  1128
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*Elset, elset=Set-1
  131,  132,  133,  134,  135,  136
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*Nset, nset=Set-2
  1213,  1214,  1215,  1216,  1217,  1218
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*Elset, elset=Set-2
    1,    2,    3,    4,    5,    6
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** Section: Steel
*Solid Section, elset=Set-2, material=Steel
,
** Section: rock
*Solid Section, elset=Set-1, material=rock
,
*End Part
**
**
** ASSEMBLY
**
*Assembly, name=Assembly
**
*Instance, name=Part-4-bottom-1, part=Part-4-bottom
*End Instance
**
*Instance, name=Part-4-top-1, part=Part-4-top
          0.,  4.87594251578977e-18,       0.0513
          0.,  4.87594251578977e-18,       0.0513,           1.,  4.87594251578977e-18,       0.0513,         180.
*End Instance
**
*Nset, nset=Set-1, instance=Part-4-bottom-1
 1282, 1283, 1284, 1285, 1286, 1287
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*Elset, elset=Set-1, instance=Part-4-bottom-1
    1,    2,    3,    4,    5,    6
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*Nset, nset=Set-2, instance=Part-4-bottom-1
 4072,
*Nset, nset=Set-3, instance=Part-4-top-1
 1282, 1283, 1284, 1285, 1286, 1287
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*Elset, elset=Set-3, instance=Part-4-top-1
    1,    2,    3,    4,    5,    6
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*Elset, elset=_m_Surf-1_S2, internal, instance=Part-4-bottom-1
  851,  852,  853,  854,  855,  856
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*Elset, elset=_m_Surf-1_S4, internal, instance=Part-4-bottom-1, generate
 4584,  4976,     8
*Elset, elset=_m_Surf-1_S3, internal, instance=Part-4-bottom-1, generate
 4977,  5049,     8
*Surface, type=ELEMENT, name=m_Surf-1
_m_Surf-1_S2, S2
_m_Surf-1_S4, S4
_m_Surf-1_S3, S3
*Elset, elset=_s_Surf-1_S2, internal, instance=Part-4-top-1
  851,  852,  853,  854,  855,  856
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*Elset, elset=_s_Surf-1_S4, internal, instance=Part-4-top-1, generate
 4584,  4976,     8
*Elset, elset=_s_Surf-1_S3, internal, instance=Part-4-top-1, generate
 4977,  5049,     8
*Surface, type=ELEMENT, name=s_Surf-1
_s_Surf-1_S2, S2
_s_Surf-1_S4, S4
_s_Surf-1_S3, S3
*Elset, elset=_Surf-1_S4, internal, instance=Part-4-bottom-1
   51,   52,   53,   54,   55,   56
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*Elset, elset=_Surf-1_S4, internal, instance=Part-4-top-1
   51,   52,   53,   54,   55,   56
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*Elset, elset=_Surf-1_S3, internal, instance=Part-4-bottom-1
   61,   62,   63,   64,   65,  959
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*Elset, elset=_Surf-1_S3, internal, instance=Part-4-top-1
   61,   62,   63,   64,   65,  959
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*Elset, elset=_Surf-1_S2, internal, instance=Part-4-bottom-1
 1024, 1025, 1026, 1027, 1028, 3695
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*Elset, elset=_Surf-1_S2, internal, instance=Part-4-top-1
    1,    2,    3,    4,    5,    6
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*Elset, elset=_Surf-1_S6, internal, instance=Part-4-bottom-1
 1029, 1035, 1041, 1047, 1053, 1059
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*Elset, elset=_Surf-1_S6, internal, instance=Part-4-top-1
 1029, 1035, 1041, 1047, 1053, 1059
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*Elset, elset=_Surf-1_S1, internal, instance=Part-4-top-1
 3783, 3784, 3785, 3786, 3787, 3788
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*Surface, type=ELEMENT, name=Surf-1
_Surf-1_S4, S4
_Surf-1_S3, S3
_Surf-1_S2, S2
_Surf-1_S6, S6
_Surf-1_S1, S1
** Constraint: coh2bottom
*Tie, name=coh2bottom, adjust=yes
Part-4-bottom-1.OffsetElements-1-BottomSurf, m_Surf-1
** Constraint: coh2top
*Tie, name=coh2top, adjust=yes
Part-4-bottom-1.OffsetElements-1-TopSurf, s_Surf-1
*End Assembly
**
** MATERIALS
**
*Material, name=Steel
*Elastic
 2e+11, 0.3
*Material, name=cohe
*Damage Initiation, criterion=MAXS
 4.57e+07, 8.61e+07, 8.61e+07
*Damage Evolution, type=ENERGY
29700.,
*Elastic, type=TRACTION
 2.3e+12, 9.7e+11, 9.7e+11
*Material, name=rock
*Depvar
     38,
*User Material, constants=12
 4.6e+10,     0.186,  7.35e-13,  1.21e-10, -3.15e-11,  2.39e-12,    10000.,  1.18e+06
     0.399,        0.,        0.,        0.
**
** INTERACTION PROPERTIES
**
*Surface Interaction, name=IntProp-1
1.,
*Friction
0.,
*Surface Behavior, pressure-overclosure=HARD
**
** INTERACTIONS
**
** Interaction: Int-1
*Contact Pair, interaction=IntProp-1, small sliding, type=SURFACE TO SURFACE, adjust=0.0
s_Surf-1, m_Surf-1
** ----------------------------------------------------------------
**
** STEP: Step-1
**
*Step, name=Step-1, nlgeom=YES, inc=1000000
*Static
0.01, 1., 1e-08, 0.02
**
** BOUNDARY CONDITIONS
**
** Name: BC-1 Type: Displacement/Rotation
*Boundary
Set-1, 3, 3
Set-1, 6, 6
** Name: BC-2 Type: Displacement/Rotation
*Boundary
Set-2, 1, 1
Set-2, 2, 2
Set-2, 4, 4
Set-2, 5, 5
Set-2, 6, 6
**
** LOADS
**
** Name: Load-1   Type: Pressure
*Dsload
Surf-1, P, 1.38e+07
**
** CONTROLS
**
*Controls, reset
*Controls, analysis=discontinuous
*Controls, parameters=time incrementation
, , , , , , , 10, , ,
**
** OUTPUT REQUESTS
**
*Restart, write, frequency=0
**
** FIELD OUTPUT: F-Output-1
**
*Output, field
*Node Output
U,
*Element Output, directions=YES
DMICRT, E, LE, S, SDEG, SDV, STATUS
**
** HISTORY OUTPUT: H-Output-1
**
*Output, history, variable=PRESELECT
*End Step
** ----------------------------------------------------------------
**
** STEP: Step-2
**
*Step, name=Step-2, nlgeom=YES, inc=1000000
*Static
0.005, 1., 1e-10, 0.005
**
** BOUNDARY CONDITIONS
**
** Name: BC-3 Type: Displacement/Rotation
*Boundary
Set-3, 3, 3, -0.0008
**
** OUTPUT REQUESTS
**
*Restart, write, frequency=0
**
** FIELD OUTPUT: F-Output-1
**
*Output, field
*Node Output
U,
*Element Output, directions=YES
DMICRT, E, LE, S, SDEG, SDV, STATUS
**
** HISTORY OUTPUT: H-Output-1
**
*Output, history, variable=PRESELECT
*End Step
