*Heading
** Job name: Mode_II_low_confining Model name: Application-2D-new
** Generated by: Abaqus/CAE 6.12-1
*Preprint, echo=NO, model=NO, history=NO, contact=NO
**
** PARTS
**
*Part, name=Part-4
*End Part
**
*Part, name=Part-5
*End Part
**
**
** ASSEMBLY
**
*Assembly, name=Assembly
**
*Instance, name=Part-4-1, part=Part-4
*Node
      1,           6.,           0.
      2,           6., 0.0500000007
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*Element, type=CPE4
   1,    1,    2,   21,   20
   2,    2,    3,   22,   21
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*Nset, nset=Set-1, generate
    1,  1159,     1
*Elset, elset=Set-1, generate
    1,  1080,     1
** Section: rock
*Solid Section, elset=Set-1, material=rock
1.,
*End Instance
**
*Instance, name=Part-4-2, part=Part-4
          6., -0.000100000000000674,           0.
          6., -0.000100000000000674,           0.,           6., -0.000100000000000674,           1.,         180.
*Node
      1,           6.,           0.
      2,           6., 0.0500000007
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*Element, type=CPE4
   1,    1,    2,   21,   20
   2,    2,    3,   22,   21
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*Nset, nset=Set-1, generate
    1,  1159,     1
*Elset, elset=Set-1, generate
    1,  1080,     1
** Section: rock
*Solid Section, elset=Set-1, material=rock
1.,
*End Instance
**
*Instance, name=Part-5-1, part=Part-5
          8.,      -0.0001,           0.
*Node
      1,         -7.5,           0.
      2,  -7.44999981,           0.
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*Element, type=COH2D4
  1,   1,   2, 113, 112
  2,   2,   3, 114, 113
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*Nset, nset=Set-1, generate
   1,  222,    1
*Elset, elset=Set-1, generate
   1,  110,    1
** Section: cohe
*Cohesive Section, elset=Set-1, material=cohe, response=TRACTION SEPARATION
, 1.
*End Instance
**
*Nset, nset=Set-3, instance=Part-4-2, generate
   19,  1159,    19
*Elset, elset=Set-3, instance=Part-4-2, generate
   18,  1080,    18
*Nset, nset=Set-1, instance=Part-4-2, generate
  1,  19,   1
*Elset, elset=Set-1, instance=Part-4-2, generate
  1,  18,   1
*Nset, nset=Set-2, instance=Part-5-1
 111,
*Elset, elset=_Surf-2_S3, internal, instance=Part-4-1, generate
 1063,  1080,     1
*Surface, type=ELEMENT, name=Surf-2
_Surf-2_S3, S3
*Elset, elset=_m_Surf-1_S4, internal, instance=Part-4-1, generate
   1,  973,   18
*Surface, type=ELEMENT, name=m_Surf-1
_m_Surf-1_S4, S4
*Elset, elset=_m_Surf-2_S4, internal, instance=Part-4-2, generate
   91,  1063,    18
*Surface, type=ELEMENT, name=m_Surf-2
_m_Surf-2_S4, S4
*Elset, elset=_s_Surf-1_S3, internal, instance=Part-5-1, generate
   1,  110,    1
*Surface, type=ELEMENT, name=s_Surf-1
_s_Surf-1_S3, S3
*Elset, elset=_s_Surf-2_S1, internal, instance=Part-5-1, generate
   1,  110,    1
*Surface, type=ELEMENT, name=s_Surf-2
_s_Surf-2_S1, S1
*Elset, elset=_m_Surf-10_S4, internal, instance=Part-4-1, generate
  991,  1063,    18
*Elset, elset=_m_Surf-10_S4, internal, instance=Part-4-2, generate
    1,  1063,    18
*Surface, type=ELEMENT, name=m_Surf-10
_m_Surf-10_S4, S4
*Elset, elset=_s_Surf-10_S4, internal, instance=Part-4-1, generate
    1,  1063,    18
*Surface, type=ELEMENT, name=s_Surf-10
_s_Surf-10_S4, S4
*Elset, elset=_Surf-1_S1, internal, instance=Part-4-1, generate
  1,  18,   1
*Elset, elset=_Surf-1_S1, internal, instance=Part-4-2, generate
  1,  18,   1
*Elset, elset=_Surf-1_S2, internal, instance=Part-4-1, generate
   18,  1080,    18
*Elset, elset=_Surf-1_S3, internal, instance=Part-4-1, generate
 1063,  1080,     1
*Elset, elset=_Surf-1_S3, internal, instance=Part-4-2, generate
 1063,  1080,     1
*Surface, type=ELEMENT, name=Surf-1
_Surf-1_S1, S1
_Surf-1_S2, S2
_Surf-1_S3, S3
** Constraint: coh2bottom_l
*Tie, name=coh2bottom_l, adjust=yes
s_Surf-2, m_Surf-2
** Constraint: coh2up_l
*Tie, name=coh2up_l, adjust=yes
s_Surf-1, m_Surf-1
*End Assembly
**
** MATERIALS
**
*Material, name=Elasticity
*Elastic
 4.6e+10, 0.183
*Material, name=cohe
*Damage Initiation, criterion=MAXS
 9.449977e+07, 9.449977e+07, 9.449977e+07
*Damage Evolution, type=ENERGY
38100.,
*Elastic, type=TRACTION
 2.3e+12, 9.7e+11, 9.7e+11
*Material, name=rock
*Depvar
     28,
*User Material, constants=12
 4.6e+10,     0.186,  7.35e-13,  1.21e-10, -3.15e-11,  2.39e-12,    10000.,  1.18e+06
     0.399,        0.,        0.,        0.
**
** INTERACTION PROPERTIES
**
*Surface Interaction, name=IntProp-1
1.,
*Friction
0.,
*Surface Behavior, pressure-overclosure=HARD
**
** BOUNDARY CONDITIONS
**
** Name: BC-1 Type: Displacement/Rotation
*Boundary
Set-3, 2, 2
**
** INTERACTIONS
**
** Interaction: Int-1
*Contact Pair, interaction=IntProp-1, small sliding, type=SURFACE TO SURFACE, adjust=0.0
s_Surf-10, m_Surf-10
** ----------------------------------------------------------------
**
** STEP: Step-1
**
*Step, name=Step-1, nlgeom=YES, inc=1000000000
*Static, stabilize=0.0002, allsdtol=0.05, continue=NO
0.01, 1., 1e-20, 0.05
**
** LOADS
**
** Name: Load-1   Type: Pressure
*Dsload
Surf-1, P, 25e+06
**
** CONTROLS
**
*Controls, reset
*Controls, analysis=discontinuous
*Controls, parameters=time incrementation
, , , , , , , 10, , ,
**
** OUTPUT REQUESTS
**
*Restart, write, frequency=0
**
** FIELD OUTPUT: F-Output-1
**
*Output, field
*Node Output
U,
*Element Output, directions=YES
DMICRT, E, LE, S, SDEG, SDV, STATUS
**
** HISTORY OUTPUT: H-Output-1
**
*Output, history, variable=PRESELECT
*End Step
** ----------------------------------------------------------------
**
** STEP: Step-2
**
*Step, name=Step-2, nlgeom=YES, inc=1000000
*Static, stabilize=0.0002, allsdtol=0.05, continue=NO
0.01, 1., 1e-15, 0.02
**
** BOUNDARY CONDITIONS
**
** Name: BC-2 Type: Displacement/Rotation
*Boundary
Set-2, 2, 2
** Name: BC-3 Type: Displacement/Rotation
*Boundary
Set-1, 1, 1
**
** LOADS
**
** Name: Load-4   Type: Pressure
*Dsload
Surf-2, P, 1e+08
**
** OUTPUT REQUESTS
**
*Restart, write, frequency=0
**
** FIELD OUTPUT: F-Output-1
**
*Output, field
*Node Output
U,
*Element Output, directions=YES
DMICRT, E, LE, S, SDEG, SDV, STATUS
**
** HISTORY OUTPUT: H-Output-1
**
*Output, history, variable=PRESELECT
*End Step
